# First Pass. This did not work
T_in := 70 R
T_out := 160 R
Delta_T := T_out - T_in = 90 Δ°F
Heat_input := 40000 BTU/hr
ρ := 8.154242 lbm/gal
η := 78%
C_p := 1.00124 BTU/(Δ°F*lbm)
A := (Heat_input*η) = 31200 BTU/hr
B := Delta_T*ρ = 733.882 Δ°F*lbm/gal
Rate := A/B*1/C_p = 0.707683 gal/min
# Second Pass: Gas Thermal
T_inlet := 70.52 °F
T_outlet := 140.13 °F
T_rise := T_outlet - T_inlet = 69.61 Δ°F
Heat_input := 38154 BTU/hr
C_p := 1.005 BTU/(Δ°F*lbm)
Heating_Value := 1070 BTU/ft^3
Gas_corr_used := 5.943 ft^3
ρ_outlet := 8.205 lbm/gal
Electric_used := 0 W*hr
Gallons_water_used := 8.75 gal
Weight_water := Gallons_water_used*ρ_outlet = 71.7938 lbm
Heat_absorbed := (Weight_water*C_p*T_rise) = 5022.55 BTU
Heat_used := (Gas_corr_used*Heating_Value) + Electric_used = 6359.01 BTU
η := Heat_absorbed/Heat_used = 0.789832
A := (Heat_input*η) = 30135.3 BTU/hr
B := T_rise*ρ_outlet = 571.15 Δ°F*lbm/gal
Rate := A/B*1/C_p = 0.874999 gal/min
